# Cazul presiunii inferioare pi = 0.14 MPa
# Pneuri de joasa presiune (0.14-0.25 MPa)
ipj := 1 .. 12
λjos_max := 0.935
pjos[ipj] := 0.14, 0.15, 0.16, 0.17, 0.18, 0.19, 0.20, 0.21, 0.22, 0.23, 0.24, 0.25
λjos_min := 0.93
λjos[ipj] := λjos_min + (ipj - 1)*(λjos_max - λjos_min)/11
λjos[ipj] = [0.93; 0.930455; 0.930909; 0.931364; 0.931818; 0.932273; 0.932727; 0.933182; 0.933636; 0.934091; 0.934545; 0.935]
# BMW 320d ED F30 (2013), pneuri 205/60 R16
# Presiune inferioară 0.140 MPa
# Date inițiale
B := 205  # [mm]  # B – balonajul maxim
p0 := pjos[1] = 0.14  # [m/s^2]  # p0 - presiunea optimă din pneuri
ρ := 0.60  # [-]
d := 16*25.4  # [mm]  # d - diametrul nominal al jantei
H_p := ρ*B  # [mm]  # H_p - înălțimea balonului
D_p := d + 2*H_p  # [mm]  # D_p - diametrul maxim exterior al jantei
r0 := D_p/2 = 326.2  # [mm]  # r0 - raza nominală a roții
λ0 := λjos[1]  # [-]
# λ0 - coeficientul de deformare al pneului
# corespunzător presiunii optime
P_max := 120  # [kW]  # P_max - puterea maximă a motorului
M_max := 380  # [Nm]  # M_max - momentul maxim
n_M := 1750  # [rot/min]  # n_M - turația de moment maxim
n_p := 4000  # [rot/min]  # n_p - turația de putere maximă
v_max := 230  # [km/h]  # v_max - viteza maximă a autovehiculului
n_max := 4500  # [rot/min]  # n_max - turația maximă a motorului
n_min := 0.2*n_p
n_min = 800  # [rot/min]  # n_min turația minimă a motorului
η_t := 0.91  # [-]  # η_t - Randamentul transmisiei
G0 := (1415 + 75)*9.81
G0 = 14616.9  # [N]  # G0 - Greutatea proprie
Gu := 1500  # [N]  # Gu - Greutatea utila
Ga := G0 + Gu
Ga = 16116.9  # [N]  # Ga - Greutatea totală
k := 6  # k - numărul total de trepte
j := 1 .. 6  # j - treapta de viteză considerată
ka := 0.26  # [-]  # ka - coeficient aerodinamic
kc := 0.92  # [-]  # kc - coeficient de corecție
H := 1.416  # [m]  # H - înălțimea autovehiculului
Ec_s := 1.583  # [m]  # Ec_s - ecartamentul autovehiculului
# Raza dinamică a roții corespunzătoare presiunii optime:
rd_0.22 := λ0*r0*10^-3
rd_0.22 = 0.303366  # [m]
# Coeficientul de rezistenta la rulare pentru presiunea optimă de umflare:
k_p := 0.9  # kp-coefcientul dependent de starea pneului
f_0.14 := k_p*(0.019/(10*p0)^(2/3) + 0.00245/(10*p0)^(1/2)*v_max^2/10^4 + 0.0042/(10*p0)^(4/3)*v_max^3/10^6)
f_0.14 = 0.0528878  # [-]
# Unghiul de înclinare longitudinală a drumului:
α_max := 15  # [deg]
# Coeficientul total de rezistență a drumului:
ψ_max := f_0.14*cos(α_max) + sin(α_max)
ψ_max = 0.61011  # [-]
# Puterea corespunzatoare momentului maxim al motorului:
P_M := (M_max*π*n_M)/30
P_M = 69638.6  # [W]
# Momentul corespunzător puterii maxime a motorului:
M_p := 9554*P_max/n_p
M_p = 286.62  # [Nm]
# Viteza critică a autovehiculului în treapta 1:
v_crI := (η_t*P_M)/(Ga*ψ_max)
v_crI = 6.44469  # [m/s]
# Raportul de transmitere al transmisiei principale:
i[0] := (π*rd_0.22*n_max)/(30*v_max/3.6)
i[0] = 2.2376  # [-]
# Raportul de transmitere al primei trepte:
i_cvI := (π*rd_0.22*n_M)/(30*i[0]*v_crI)
i_cvI = 3.85522  # [-]
# Rapoartele de transmitere în diferite trepte de viteză:
icv[j] := nthroot((i_cvI^((k - 2) - j)), k - 3)
# Rapoartele de transmitere obținute pe baza calculelor și rapoartelor date de către producator  [-]:
icv[j] := 3.8484, 2.10491, 1.31369, 1, 0.802, 0.659
# Raportul total de transmitere din cutia de viteze  [-]:
i_t[j] := icv[j]*i[0]
i_t[j] = [8.61118; 4.70995; 2.93951; 2.2376; 1.79456; 1.47458]
j := 1 .. k  # j - treapta de viteză considerată
# Coeficientul de adaptabilitate se determină  [-]:
C_a := M_max/M_p
# Coeficientul de elasticitate  [-]:
C_e := n_M/n_p
# Coeficienții α,β,γ se determină cu ajutorul relațiilor [-]:
α := (C_e^2 - C_a*(2*C_e - 1))/(C_e - 1)^2
γ := (C_a - 1)/(C_e - 1)^2
β := (2*C_e*(C_a - 1))/(C_e - 1)^2
α + β - γ = 1
idm := n_min, n_min + 10 .. n_max  # idm - interval de turație [rot/min]
# Vitezele corespunzătoare treptelor de viteză pe toată
# gama de turații idm a motorului [km/h]:
v[j, idm] := 0.377*rd_0.22*idm/i_t[j]
# Puterea corespunzătoare treptelor de viteză pe toată
# gama de turații idm a motorului [W]:
P[j, idm] := P_max*(α*v[(j, idm)]*i_t[j]/(0.377*rd_0.22*n_p) + β*(v[j, idm]*i_t[j]/(0.377*rd_0.22*n_p))^2 - γ*(v[j, idm]*i_t[j]/(0.377*rd_0.22*n_p))^3)
# Puterea la roată corespunzătoare treptelor de viteză pe toată
# gama de turații idm a motorului [W]:
P_R[j, idm] := η_t*P[j, idm]
# Momentul la roată corespunzătoare treptelor de viteză pe toată
# gama de turații idm a motorului [Nm]:
M_R[j, idm] := 9554*0.377*P_R[j, idm]*rd_0.22/v[j, idm]
# Forța la roată corespunzătoare treptelor de viteză pe toată
# gama de turații idm a motorului [N]:
X_R[j, idm] := M_R[j, idm]/rd_0.22
# Aria secțiunii transversale a autovehiculului:
Sf := H*Ec_s*kc = 2.06221  # [m]
# Factorul dinamic se determină conform relației:
D[j, idm] := (X_R[j, idm]*icv[j] - ka*Sf*(v[j, idm]/36)^2/icv[j]^2)/Ga  # [-]
ψ_max := 0.016
# Coeficientul rezistenței totale a drumului pentru
# drum asfalt uscat în stare bună  [-]
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# Coeficientul de influenta a maselor in miscare de rotatie  [-]:
σ := 0.05
δ_rot[j] := 1 + σ*icv[j]^2
# Accelerația autovehiculului în funcție de treapta de viteză și
# turația idm a motorului [m/s^2]:
a[j, idm] := (D[j, idm] - ψ_max)*9.81/δ_rot[j]
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j1 := 2 .. k - 1  # Treapta de viteză considerată  [-]
n_ec := 0.7*n_p = 2800  # [rot/min]
idm1 := n_min, n_min + 10 .. n_ec - 10  # idm1 - Turația considerată pentru j1
idm2 := n_min, n_min + 10 .. 0.9*n_max  # idm2 - Turația considerată pentru j = k
# Pentru reprezentarea grafică a timpului și spațiului de demarare în treapta 1 de viteză
# și conform turației idm1 se calculează ariile
Δt[1, idm1] := (v[1, idm1 + 10] - v[1, idm1])*(1/a[1, idm1] + 1/a[1, idm1 + 10])/(2*3.6)  # [s]
Δs[1, idm1] := Δt[1, idm1]*(v[1, idm1 + 10] + v[1, idm1])/7.2  # [m]
i := n_min
# Timpul necesar demarării in treapta 1 de viteză [s]:
t[1] := sum(Δt[1, i], i = n_min .. n_ec - 10) = 0.571904
# Spațiul necesar demarării în treapta 1 de viteză [m]:
s[1] := sum(Δs[1, i], i = n_min .. n_ec - 10) = 3.80145
# Pentru reprezentarea grafică a timpului și spațiului de demarare în treapta de viteză considerată, j1 și conform turației idm1 se calculează ariile
Δt[j1, idm1] := if(v[j1, idm1] ≥ v[j1 - 1, n_ec], 1/(3.6*2)*(v[j1, idm1 + 10] - v[j1, idm1])*(a[j1, idm1 + 10] + a[j1, idm1])/(a[j1, idm1 + 10]*a[j1, idm1]), 0)
Δs[j1, idm1] := if(v[j1, idm1] ≥ v[j1 - 1, n_ec], Δt[j1, idm1]/(2*3.6)*(v[j1, idm1 + 10] + v[j1, idm1]), 0)
# Pentru reprezentarea grafică a timpului și spațiului de demarare în toate treptele de viteză k și conform turației idm2 se calculează ariile
Δt[k, idm2] := if(v[k, idm2] ≥ v[k - 1, n_ec], 1/(3.6*2)*(v[k, idm2 + 10] - v[k, idm2])*(a[k, idm2 + 10] + a[k, idm2])/(a[k, idm2 + 10]*a[k, idm2]), 0)
Δs[k, idm2] := if(v[k, idm2] ≥ v[k - 1, n_ec], Δt[k, idm2]/(2*3.6)*(v[k, idm2 + 10] + v[k, idm2]), 0)
# Timpul necesar demararii in treptele de viteza [s]: | Spațiul necesar demarării în treptele de viteză [m]:
t[j] := sum(Δt[j, i], i = n_min .. n_ec - 10)
s[j] := sum(Δs[j, i], i = n_min .. n_ec - 10)
t[j] = [0.571904; 1.56905; 4.98557; 7.29177; 12.5486; 22.8354]
s[j] = [3.80145; 23.0261; 122.859; 256.025; 561.508; 1258.48]
# Durata și spațiul de demarare în treapta 1 conform turației idm1 se determină
t[1, idm1] := sum(Δt[1, i], i = n_min .. idm1)  # [s]
s[1, idm1] := sum(Δs[1, i], i = n_min .. idm1)  # [m]
# Durata de demarare pentru treapta j1 și turația idm1 [m]:
t[j1, idm1] := if(v[j1, idm1] ≥ v[j1 - 1, n_ec], t[j1 - 1, n_ec - 10] + sum(Δt[j1, i], i = n_min .. idm1), 0)
# Durata de demarare pentru treapta k și turația idm1 [s]:
t[k, idm1] := if(v[k, idm1] ≥ v[k - 1, n_ec], t[k - 1, n_ec - 10] + sum(Δt[k, i], i = n_min .. idm1), 0)
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# Spațiul de demarare pentru treapta j1 și turația idm1 [m]:
s[j1, idm1] := if(v[j1, idm1] ≥ v[j1 - 1, n_ec], s[j1 - 1, n_ec - 10] + sum(Δs[j1, i], i = n_min .. idm1), 0)
# Spațiul de demarare pentru treapta k și turația idm2 [m]:
s[k, idm2] := if(v[k, idm2] ≥ v[k - 1, n_ec], s[k - 1, n_ec - 10] + sum(Δs[k, i], i = n_min .. idm2), 0)
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